F_1 := 1.66 N  # приложеная сила
b := 2.5*mm  # ширина балки
h := 0.5*mm  # высота балки в месте приложения нагрузки
a := 36*mm  # расстояние от защемления до приложения силы
k := 0.50*mm  # увеличение высоты у места защемления
W_x := b*h^2/6
W_x = 1.04167e-7 L
M := F_1*a
M = 0.05976 J
σ := M/W_x
σ = 573696000 Pa
f(x) := F_1*x/(b*(h + k*x/a)^2/6)
r1 := 0.036
r2 := 0.4*10^9
# Диаграмма напряжений
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