# Расчет стержней на изгиб
# (используй таблицы из справочника по сопромату)
F_1 := 4*N
a := 500*mm
q := F_1/a
q = 8 kg/s^2
M_xmax := 3*q*a^2/2
M_xmax = 3 kg*m^2/s^2
E := 2*10^6*kgf/cm^2
# Прямоугольник:
σ_1 := 1000*kgf/cm^2
σ_1 = 98066500 kg/(m*s^2)
# ширина
b := 10*mm
# высота
h := 10*mm
# момент сопротивления изгибу
W_x := b*h^2/6
W_x = 1.66667e-7 m^3
σ := M_xmax/W_x
σ = 18000000 kg/(m*s^2)
# Полый прямоугольник:
# ширина отверстия
b_2 := 0 mm
# высота отверстия
h_2 := 0*mm
# момент сопротивления изгибу
W_x := (b*h^3 - b_2*h_2^3)/(6*h)
W_x = 1.66667e-7 m^3
σ := M_xmax/W_x
σ = 18000000 kg/(m*s^2)
# Тавр:
# ширина ребра
b_1 := 900 mm
# высота ребра
h_1 := 30*mm
y_c := (b*h^2 + b_1*h_1*(2*h + h_1))/(2*(b*h + b_1*h_1))
y_c = 0.0249262 m
J_x := ((b*h^3 + b_1*h_1^3)/12) + b*h*(y_c - h/2)^2 + b_1*h_1*(h_1/2 + h - y_c)^2
W_x := J_x/y_c
W_x = 8.28721e-5 m^3
σ := M_xmax/W_x
σ = 36200.4 kg/(m*s^2)
v_max := (-41*q*a^4)/(24*E*J_x)
v_max = -2.10828e-6 m
# Пруток:
F_1 := 1000*N
F_1 = 1000 kg*m/s^2
L1 := 0.009 m
d := 4*mm
γ := 7.8*10^-6*kgf/mm^3
G1 := π*d^2/4*L1*γ
G1 = 0.00865103 kg*m/s^2
q := G1/L1
q = 0.961225 kg/s^2
M_xmax := F_1*L1 + 0.5*q*L1^2
M_xmax = 9.00004 kg*m^2/s^2
W_x := π*d^3/32
σ := M_xmax/W_x
σ = 1.4324e9 kg/(m*s^2)
σ_1 := 1000*kgf/cm^2
σ_1 = 98066500 kg/(m*s^2)
200 Pa*10^6 = 200000000 kg/(m*s^2)
