# Расчет штифта на срез
# (используй таблицы из справочника по сопромату)
P := 20*kgf  # сила на рычаге
L_1 := 25*mm  # расстояние от оси вращения до штифта
L_2 := 1000*mm  # длина рычага
τ_1 := 1900*kgf/cm^2  # допускаемое напряжение на срез
P_1 := P*L_2/L_1
P_1 = 7845.32 kg*m/s^2
d := sqrt((4*P_1)/(π*τ_1))
d = 0.00732189 m  # необходимый диаметр штифта
# Расчет рычага на изгиб
L_3 := 700*mm  # расстояние до расчетного сечения
M_xmax := P*L_3
M_xmax = 137.293 kg*m^2/s^2
# Круг:
σ_1 := 1000*kgf/cm^2
σ_1 = 98066500 kg/(m*s^2)
# диаметр
d_1 := 26*mm
# момент сопротивления изгибу
W_x := d_1^3*π/32
W_x = 1.72552e-6 m^3
σ := M_xmax/W_x
σ = 79566229 kg/(m*s^2)
# Прямоугольник:
# ширина
b := 26*mm
# высота
h := 26*mm
# момент сопротивления изгибу
W_x := b*h^2/6
W_x = 2.92933e-6 m^3
σ := M_xmax/W_x
σ = 46868377 kg/(m*s^2)
# Полый прямоугольник:
# ширина отверстия
b_2 := 0 mm
# высота отверстия
h_2 := 0*mm
# момент сопротивления изгибу
W_x := (b*h^3 - b_2*h_2^3)/(6*h)
W_x = 2.92933e-6 m^3
σ := M_xmax/W_x
σ = 46868377 kg/(m*s^2)
# Тавр:
# ширина ребра
b_1 := 10 mm
# высота ребра
h_1 := 10*mm
y_c := (b*h^2 + b_1*h_1*(2*h + h_1))/(2*(b*h + b_1*h_1))
y_c = 0.0153196 m
J_x := ((b*h^3 + b_1*h_1^3)/12) + b*h*(y_c - h/2)^2 + b_1*h_1*(h_1/2 + h - y_c)^2
W_x := J_x/y_c
W_x = 4.38259e-6 m^3
E := 2*10^6*kgf/cm^2
σ := M_xmax/W_x
σ = 31326961 kg/(m*s^2)
v_max := P*L_2/(2*E*J_x)
v_max = 0.00744719 1/m
