# Расчет прессовой посадки
d := 10.0*mm  # диаметр сопряжения
d1 := 0.00*mm  # внутренний диаметр вала
D := 300.0*mm  # наружный диаметр кольца
l := 15.0*mm  # длина сопряжения
F1 := 20000 newton  # осевая сила
E1 := 2.18*10^11*Pa  # модуль упругости вала
1 MPa = 1000000 kg/(m*s^2)
E2 := 2.18*10^11*Pa  # модуль упругости кольца
μ1 := 0.3
μ2 := 0.33
α1 := 1.0*10^-5*1/K  # коэффициент теплового расширения вала
α2 := 1.0*10^-5*1/K  # коэффициент теплового расширения кольца
σт1 := 635*10^6*Pa  # предел текучести вала
σт2 := 635*10^6*Pa  # предел текучести кольца
Rz1 := 3.2*10^-3*mm  # шероховатость вала
Rz2 := 3.2*10^-3*mm  # шероховатость кольца
f := 0.15  # коэффициент трения
k := 0.4  # коэффициент смятия
C1 := (1 + (d/D)^2)/(1 - (d/D)^2) + μ1
C1 = 1.30222
C2 := (1 + (d1/d)^2)/(1 - (d1/d)^2) - μ2
C2 = 0.67
Nminp := (F1/(π*l*f))*(C1/E1 + C2/E2)
Nminp = 2.55975e-5 m
Pвтд := 0.58*σт2*(1 - (d/D)^2)
Pвтд = 367890778 kg/(m*s^2)
Pвалд := 0.58*σт1*(1 - (d1/d)^2)
Pвалд = 368300000 kg/(m*s^2)
Pд := Pвтд
Nmaxp := Pд*d*(C1/E1 + C2/E2)
Nmaxp = 3.32827e-5 m
u := 2*k*(Rz1 + Rz2)
u = 5.12e-6 m
Nfmax := Nmaxp + u
Nfmax = 3.84027e-5 m
Nfmin := Nminp + u
Nfmin = 3.07175e-5 m
Nmax := 0.05*mm
Nmin := 0.01*mm
1*atm = 101325 kg/(m*s^2)
Nтср := 0.5*(Nmax + Nmin)
Nтср = 3e-5 m
Pпр := (Nтср - u)/(d*(C1/E1 + C2/E2))
Pпр = 275011261 kg/(m*s^2)
# σт мат
30 kgf/mm^2 = 294199500 kg/(m*s^2)
fпр := 0.14  # коэффициент трения прессования
Fпр := π*d*l*Pпр*fпр
Fпр = 18143.4 kg*m/s^2  # усилие прессования
Fпр1 := Fпр/g
Fпр1 = 1850.12 kg
zсб := 0.017*mm  # зазор для сборки
tвт := 20*K + (Nmax + zсб)/(d*α2)
tвт = 690 K
tвал := 20*K - (Nmax + zсб)/(d*α1)
tвал = -650 K
# Принятая температура
tвт := 250*K
tвал := -170*K
Nвт := (tвт - 20*K)*d*α2
Nвт = 2.3e-5 m
Nвал := (20*K - tвал)*d*α1
Nвал = 1.9e-5 m
Nсумм := Nвт + Nвал
Nсумм = 4.2e-5 m
Pпр := (Nтср - Nсумм - u)/(d*(C1/E1 + C2/E2))
Pпр = -189236045 kg/(m*s^2)
Fпр := π*d*l*Pпр*fпр
Fпр = -12484.6 kg*m/s^2  # усилие прессования
Fпр1 := Fпр/g
Fпр1 = -1273.07 kg
