# Расчет внутреннего диаметра пружинок сальников
d := 0.5 mm  # диаметр проволоки
L := 425.0 mm  # длина пружины
n := L/d
n = 850  # число витков
R1 := d/(2*sin(180*deg/n))
D := R1*2 - d
D = 0.134782 m  # внутренний диаметр скрученой пружины
# Диаграмма растяжения пружинки
S1 := (L + L*0.05)
S1 = 0.44625 m
F1 := 0.50*N
F3 := 0.90*N
S2 := (L + L*0.1)
S2 = 0.4675 m
F2 := 2.5*N
F4 := 1.55*N
f(x) := F1 + (F2 - F1)*(x - S1)/(S2 - S1)
f1(x) := F3 + (F4 - F3)*(x - S1)/(S2 - S1)
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x := 470*mm
f(x) = 2.73529 kg*m/s^2
