# Исходные данные
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D_ном1 := 12.0  # номинальный размер 1 детали
K_верх1 := 0.0  # верхний допуск 1 детали
K_низ1 := -0.43  # нижний допуск 1 детали
D_ном2 := 2.5  # номинальный размер 2 детали
K_верх2 := 0.0  # верхний допуск 2 детали
K_низ2 := -0.14  # нижний допуск 2 детали
# Расчет  средних и экстремальных размеров
D_макс1 := D_ном1 + K_верх1
D_макс1 = 12  # максимальный размер 1 детали
D_мин1 := D_ном1 + K_низ1
D_мин1 = 11.57  # минимальный размер 1 детали
D_макс2 := D_ном2 + K_верх2
D_макс2 = 2.5  # максимальный размер 2 детали
D_мин2 := D_ном2 + K_низ2
D_мин2 = 2.36  # минимальный размер 2 детали
# Расчет  суммарного размера и допуска
D_макс3 := D_макс1 + D_макс2
D_макс3 = 14.5  # максимальный сумм размер
D_мин3 := D_мин1 + D_мин2
D_мин3 = 13.93  # минимальный сумм размер
# Расчет  охватываемого размера и допуска
D_макс4 := D_макс1 - D_мин2
D_макс4 = 9.64  # максимальный сумм размер
D_мин4 := D_мин1 - D_макс2
D_мин4 = 9.07  # минимальный сумм размер
# Подгонка размеров и допусков в цепочке под D_ном2
D_ср1 := (D_макс1 + D_мин1)/2
D_ср1 = 11.785  # средний размер 1 детали
D_ср2 := (D_макс2 + D_мин2)/2
D_ср2 = 2.43  # средний размер 2 детали
D_ср3 := D_ср1 - D_ср2
D_ср3 = 9.355  # средний размер 3 детали
Δ3 := D_макс2 - D_мин2
Δ3 = 0.14  # допуск 2 детали
D_мин1в := D_ср1 - Δ3/2
D_мин1в = 11.715
D_мин3в := D_ср3 - Δ3/2
D_мин3в = 9.285
D_макс2в := D_ср1 - D_мин3в
D_макс2в = 2.5  # проверка
D_мин2в := D_мин1в - D_ср3
D_мин2в = 2.36
