# Расчет стержней на устойчивость
# (используй таблицы из справочника по сопромату)
J_min := 74.1*cm^4
F := 19.2*cm^2  # Площадь поперечного сечения
μ := 2
L := 1.8*m  # Длина стержня
σ_сж := 1300*kg/cm^2
i_min := sqrt(J_min/F)
i_min = 0.0196453 m
λ := μ*L/i_min
λ = 183.25
ϕ := 0.21
P_доп := ϕ*σ_сж*F
P_доп = 5241.6 kg
E := 21*10^5*kg/cm^2
P_кр := (π^2*E*J_min)/L^2
P_кр = 47401.5 kg
