# Расчет параметров резьбы
k := 1.0  # масштаб резьбы
P := 1.750*k
P = 1.75  # шаг резьбы
D := 12*k
D = 12  # Наружный диаметр резьбы
α := 60*deg  # Угол резьбы
H := P*cos(α/2)
H = 1.51554  # полная высота резьбы
D2 := D - 3*H/4
D2 = 10.8633  # Средний диаметр резьбы
D1 := D - 5*H/4
D1 = 10.1056  # Внутренний диаметр резьбы гайки
Dвв := D - 17*H/12
Dвв = 9.85298  # Диаметр впадин резьбы винта
Dвг := D + H/4
Dвг = 12.3789  # Диаметр впадин резьбы гайки
