# Расчет цепной передачи
# Расчет звездочки
# Шаг цепи
t := 25.4*mm
# Диаметр ролика (втулки) цепи
d := 15.88*mm
# Число зубьев звездочки
z := 40
# Внутренняя ширина цепи
B_вн := 15.88*mm
# Диаметр делительный окружности
d_d := t/sin((180*deg)/z)
d_d = 0.323736 m
# Диаметр окружности выступов
D_е := t*(0.5 + (1/tan((180*deg)/z)))
D_е = 0.335438 m
# Радиус впадин
r := 0.5025*d + 0.05*mm
r = 0.0080297 m
# Радиус сопряжения
r_1 := 0.8*d + r
r_1 = 0.0207337 m
# Половина угла впадины
α := 55 deg - 60*deg/z
α_1 := α/deg
α_1 = 53.5
# Угол сопряжения
β := 18 deg - (56*deg)/z
β_1 := β/deg
β_1 = 16.6
# Половина угла зуба
ϕ := 17 deg - 64*deg/z
ϕ_1 := ϕ/deg
ϕ_1 = 15.4
# Диаметр окружности впадин
D_i := d_d - 2*r
D_i = 0.307676 m
# Наибольшая хорда
L_x := d_d*cos(95*deg/z) - 2*r
L_x = 0.307398 m
# Радиус головки зуба
r_2 := d*(1.24*cos(ϕ) + 0.8*cos(β) - 1.3025) - 0.05*mm
r_2 = 0.010425 m
# Прямой участок профиля
FC := d*(1.24*sin(ϕ) - 0.8*sin(β))
FC = 0.00159973 m
# Расстояние от центра дуги
# впадины до центра дуги выступа
# зуба
OO_2 := d*1.24
OO_2 = 0.0196912 m
# Смещение центров дуг впадин
e := 0.03*t
e = 0.000762 m
# Координаты точки О1
x[1] := 0.8*d*sin(α)
x[1] = 0.0102122 m
y[1] := 0.8*d*cos(α)
y[1] = 0.00755663 m
# Координаты точки О2
x[2] := 1.24*d*cos(180*deg/α)
x[2] = -0.0192041 m
y[2] := 1.24*d*sin(180*deg/α)
y[2] = -0.00435278 m
# Радиус закругления
r_3 := 1.7*d
r_3 = 0.026996 m
# Расстояние от вершины зуба
# до линии центра дуг
H := 0.8*d
H = 0.012704 m
# Ширина зуба
m_1 := 0.93*B_вн - 0.15*mm
m_1 = 0.0146184 m
