# Расчет цилиндрической или реечной передачи
# Расчет шестерен
# Число зубьев шестерни z_1
z_1 := 16
# Число зубьев колеса z_2
z_2 := 500
# Модуль m
m := 1.5
# Модуль m выбирается из ряда:
# 0.05, 0.06, 0.08, 0.1, 0.12, 0.15, 0.2, 0.25, 0.3, 0.4,
# 0.5, 0.6, 0.8, 1, 1.25, 1.5, 2, 2.5, 3, 4, 5, 6, 8, 10, 12,
# 16, 20, 25, 32, 40, 50, 60, 80, 100
# Угол наклона зуба β
β := 0*deg  # рекомендуется принимать не более 20^о
# Угол профиля α
α := 20*deg
# Коэффициент высоты
# головки h_a
h_a := 1
# Коэффициент радиального
# зазора c
c := 0.25  # рекомендуется принимать 0.25...0.4
# Коэффициент радиуса
# кривизны ρ_f
ρ_f := 0.38
# Коэффициент смещения
x_1 := 0.0  # 0.3, если 12<z1<16
x_2 := -0.0  # -0.3, если z2>22
# Ширина венца b_1
b_1 := 4
# Делительное межосевое
# расстояние мм
a := (z_1 + z_2)*m/(2*cos(β))
a = 387
α_t := 1
# Коэффициент суммы
# смещений
x_Σ := x_1 + x_2
x_Σ = 0
# Угол профиля α_t
k := tan(α)/cos(β)
Given
k = 0.36397
tan(α_t) == k
α_t := Find(α_t)
α_t*180/π = 20
α_t = 0.349066
# Угол зацепления α_t_ω
α_tω := 1
k := (2*x_Σ*tan(α))/(z_1 + z_2) + (tan(α_t) - α_t)
k = 0.0149044
Given
tan(α_tω) - α_tω == k
α_tω := Find(α_tω)
α_tω*180/π = 20
# Межосевое расстояние мм
a_ω := (z_1 + z_2)*m*cos(α_t)/(2*cos(β)*cos(α_tω))
a_ω = 387
# Делительный диаметр d
d_1 := z_1*m/cos(β)
d_1 = 24
d_2 := z_2*m/cos(β)
d_2 = 750
# Передаточное число u
u := z_2/z_1
u = 31.25
# Начальный диаметр d_w
d_ω1 := 2*a_ω/(u + 1)
d_ω1 = 24
d_ω2 := 2*a_ω*u/(u + 1)
d_ω2 = 750
# Диаметр основной
# окружности мм
d_b1 := d_1*cos(α)
d_b1 = 22.5526
d_b2 := d_2*cos(α)
d_b2 = 704.769
# Коэффициент
# воспринимаемого
# смещения
y := (a_ω - a)/m
y = 0
# Коэффициент
# уравнительного
# смещения
Δy := x_Σ - y
Δy = 0
# Диаметр вершин зубьев d_a
d_a1 := d_1 + 2*(h_a + x_1 - Δy)*m
d_a1 = 27
d_a2 := d_2 + 2*(h_a + x_2 - Δy)*m
d_a2 = 753
# Диаметр впадин d_f
# (справочный размер)
d_f1 := d_1 - 2*(h_a + c - x_1)*m
d_f1 = 20.25
d_f2 := d_2 - 2*(h_a + c - x_2)*m
d_f2 = 746.25
# Высота зубьев
h_1 := 0.5*(d_a1 - d_f1)
h_1 = 3.375
h_2 := 0.5*(d_a2 - d_f2)
h_2 = 3.375
# Постоянная хорда s_c
s_c1 := (0.5*π*cos(α)^2 + x_1*sin(2*α))*m
s_c1 = 2.08057
s_c2 := (0.5*π*cos(α)^2 + x_2*sin(2*α))*m
s_c2 = 2.08057
# Высота до постоянной
# хорды h_c
h_c1 := 0.5*(d_a1 - d_1 - s_c1*tan(α))
h_c1 = 1.12137
h_c2 := 0.5*(d_a2 - d_2 - s_c2*tan(α))
h_c1 = 1.12137
# Расчет рейки
# Модуль основной
# (торцовый)  m_t
m_t := m/cos(β)
m_t = 1.5
# Шаг нормальный p_n
p_n := π*m
p_n = 4.71239
# Шаг торцовый p_t
p_t := p_n/cos(β)
p_t = 4.71239
# Высота головки зуба h_a
h_a1 := h_a*m
h_a1 = 1.5
# Длина нарезаной рейки
L := 82
# Число зубьев
z := L/p_n + 0.5
z = 17.9009
# Высота зуба h
h := (2*h_a + c)*m
h = 3.375
# Ширина рейки b
b := 2*m
# коэффициент принимается от 2 до 10
b = 3
# Длина косого зуба b_1
b_1 := b/cos(β)
b_1 = 3
# Толщина зуба h
s_y := 0.5*π*m
s_y = 2.35619
# Измерительная высота
h_ay := m
h_ay = 1.5
# Линейное перемещение
# рейки L, соответствующее
# углу поворота колеса или
# червяка
γ := 360  # угол поворота колеса или червяка
L := γ/360*p_t*z_1
L = 75.3982
# Угол поворота колеса g,
# соответсвующий перемещению
# рейки на величину L
L := 27  # перемещение рейки
γ := L*360/(p_t*z_1)
γ = 128.916  # град
