# Расчет червячной передачи
# Модуль
m := 5
# Модуль m выбирается из ряда:
# 1, 1.25, (1.5), 2, 2.5, (3), 3.15, (3.5), 4, 5, (6), 6.3), (7), 8, 10, (12), 12.5, 14, 16, 20
# Коэффициент диаметра червяка
q := 10
# Число заходов червяка
z_1 := 1
# Вид червяка | ZI
# Угол профиля
αns := 20*deg
# Коэффициент расчетной толщины
s := 0.5*π
s = 1.5708
# Коэффициент высоты головки
h_a := 1
# Коэффициент радиального
# зазора
c := 0.2
# Коэффициент высоты витка
h := 2*h_a + c
h = 2.2
# Коэффициент радиуса
# кривизны
ρ_f := 0.3
# межосевое расстояние
a_ω := 100
# Передаточное число
u := 30
# Расчет геометрических параметров
# Число зубьев колеса
z_2 := z_1*u
z_2 = 30
# Принимаю число зубьев колеса
z_2 := 30
# Коэффициент смещения червяка
x := (a_ω/m) - 0.5*(z_2 + q)
x = 0
# Делительный диаметр
# червяка
d_1 := q*m
d_1 = 50
# колеса
d_2 := z_2*m
d_2 = 150
# Начальный диаметр червяка
d_ω1 := (q + 2*x)*m
d_ω1 = 50
# Делительный угол подъема
k := z_1/q
γ := 10*deg
Given
tan(γ) == k
γ := Find(γ)
γ*180/π = 5.71059
# Начальный угол подъема
k := z_1*m/d_ω1
γω := 10*deg
Given
tan(γω) == k
γω := Find(γω)
γω*180/π = 5.71059
# Высота витка червяка
h_1 := h*m
h_1 = 11
# Высота головки червяка
h_a1 := h_a*m
h_a1 = 5
# Диаметр вершин червяка
d_a1 := d_1 + 2*h_a*m
d_a1 = 60
# колеса
d_a2 := d_2 + 2*(h_a + x)*m
d_a2 = 160
# Наибольший диаметр червячного колеса
d_am2 := d_a2 + 6*m/(z_1 + 2)
d_am2 = 170
# Радиус кривизны переходной кривой червяка
ρ_f1 := ρ_f*m
ρ_f1 = 1.5
# Длина нарезанной части червяка
b1 := (11 + 0.1*z_2)*m
b1 = 70
# Принимаем
b1 := 80
# Ширина венца червячного колеса
b2 := 0.75*d_a1
b2 = 45
# Радиус выемки поверхности вершин зубьев червячного колеса
R := 0.5*d_1 - m*h_a
R = 20
# Расчетный шаг червяка
p1 := π*m
p1 = 15.708
# Ход витка
pz1 := p1*z_1
pz1 = 15.708
# Делительная толщина по хорде витка червяка
sa1 := s*m*cos(γ)
sa1 = 7.815
# Высота до хорды витка
k := sa1*sin(γ)^2/d_1
Given
sin(γ) == k
γ := Find(γ)
γ*180/π = 0.0886667
h_a2 := h_a*m + 0.5*sa1*tan(0.5*γ)
h_a2 = 5.00302
